*Heading
** Job name: Job-1 Model name: Model-1
** Generated by: Abaqus/CAE Unofficial Packaging Version
*Preprint, echo=NO, model=NO, history=NO, contact=NO
**
** PARTS
**
*Part, name=Part-1
*End Part
**
**
** ASSEMBLY
**
*Assembly, name=Assembly
**
*Instance, name=Part-1-1, part=Part-1
*Node
      1,           0.,          10.
      2, -0.00249999994,          10.
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*Element, type=B21
1, 2, 1
2, 3, 2
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*Nset, nset=Set-1, generate
   1,  148,    1
*Elset, elset=Set-1, generate
   1,  200,    1
*Nset, nset=Set-2, generate
   1,  148,    1
*Elset, elset=Set-2, generate
   1,  200,    1
** Section: Beam section  Profile: Profile-1
*Beam Section, elset=Set-1, material=steel, temperature=GRADIENTS, section=CIRC
0.000375
0.,0.,-1.
*End Instance
**
*Nset, nset=Set-1, instance=Part-1-1
  27,  31,  32,  38,  39,  49,  57,  58,  73,  74,  91,  92, 109, 110, 127, 128
*Elset, elset=Set-1, instance=Part-1-1
  36,  43,  59,  72,  93, 118, 143, 168
*Nset, nset=Set-2, instance=Part-1-1
  10,  12,  18,  23,  47,  68,  83,  85, 101, 103, 119, 121, 137, 139, 145, 147
*Nset, nset=Set-4, instance=Part-1-1
  10,  12,  18,  23,  47,  68,  83,  85, 101, 103, 119, 121, 137, 139, 145, 147
*Nset, nset=Set-5, instance=Part-1-1
  27,  31,  32,  38,  39,  49,  57,  58,  73,  74,  91,  92, 109, 110, 127, 128
*Elset, elset=Set-5, instance=Part-1-1
  36,  43,  59,  72,  93, 118, 143, 168
*End Assembly
**
** MATERIALS
**
*Material, name=steel
*Elastic
 2e+11, 0.3
*Density
 7850.,
** ----------------------------------------------------------------
**
** STEP: Step-1 - Frequency Extraction
**
*Step, name=Step-1, nlgeom=NO, perturbation
*Frequency, eigensolver=LANCZOS
50, , , ,
**
** BOUNDARY CONDITIONS
**
** Name: BC-1 Type: Symmetry/Antisymmetry/Encastre
*Boundary
Set-5, XASYMM
**
** OUTPUT REQUESTS
**
*Restart, write, frequency=0
**
** FIELD OUTPUT: F-Output-1
**
*Output, field, variable=PRESELECT
**
** HISTORY OUTPUT: H-Output-1
**
*Output, history, variable=PRESELECT
*End Step
**
** STEP: Step-2 - Steady State Dynamics (Frequency Response)
**
*Step, name=Step-2, nlgeom=NO, perturbation
*Steady State Dynamics, Direct
100, 30000, 500
**
** BOUNDARY CONDITIONS
**
** Name: BC-2 Type: Symmetry/Antisymmetry/Encastre
*Boundary
Set-5, XASYMM
**
** LOADS
**
** Name: Load-2   Type: Concentrated force (Harmonic)
*Cload
Set-4, 2, -3200.
**
** OUTPUT REQUESTS
**
*Restart, write, frequency=0
**
** FIELD OUTPUT: F-Output-2
**
*Output, field, variable=PRESELECT
**
** HISTORY OUTPUT: H-Output-2 - Total Strain Energy for whole model
**
*Output, history
*Energy Output
ALLSE,
*End Step
